// SBML level 2 version 4

// (AU/min) synthesis of size-independent protein
function rSyPi(kSyPi, GITM, CPI, GIt)
  kSyPi*GITM*(CPI/GIt);
end

// (AU/min) synthesis of size-dependent protein
function rSyPd(kSyPd, GDTM, CPD, GDt)
  kSyPd*GDTM*(CPD/GDt);
end

// (molecules/min) synthesis of transcription machinery
function rSyTm(kSyTm, GDTM, GCN, GDt)
  kSyTm*GDTM*(GCN/GDt);
end

model New_Model()
  // This model is described in the article:
  // Dilution and titration of cell-cycle regulators may control cell size in budding yeast
  // Frank S. Heldt, Reece Lunstone, John J. Tyson, Bela Novak
  // PLoS Comput Biol, October 2018, 14(10), e1006548, doi: 10.1371/journal.pcbi.1006548
  // Abstract:
  // The size of a cell sets the scale for all biochemical processes within it, thereby affecting cellular fitness and survival. Hence, cell size needs to be kept within certain limits and relatively constant over multiple generations. However, how cells measure their size and use this information to regulate growth and division remains controversial. Here, we present two mechanistic mathematical models of the budding yeast (S. cerevisiae) cell cycle to investigate competing hypotheses on size control: inhibitor dilution and titration of nuclear sites. Our results suggest that an inhibitor-dilution mechanism, in which cell growth dilutes the transcriptional inhibitor Whi5 against the constant activator Cln3, can facilitate size homeostasis. This is achieved by utilising a positive feedback loop to establish a fixed size threshold for the START transition, which efficiently couples cell growth to cell cycle progression. Yet, we show that inhibitor dilution cannot reproduce the size of mutants that alter the cell’s overall ploidy and WHI5 gene copy number. By contrast, size control through titration of Cln3 against a constant number of genomic binding sites for the transcription factor SBF recapitulates both size homeostasis and the size of these mutant strains. Moreover, this model produces an imperfect ‘sizer’ behaviour in G1 and a ‘timer’ in S/G2/M, which combine to yield an ‘adder’ over the whole cell cycle; an observation recently made in experiments. Hence, our model connects these phenomenological data with the molecular details of the cell cycle, providing a systems-level perspective of budding yeast size control.

  // Compartments:
  // (AV) cell volume
  compartment V = 0.5;

  // Species:
  // (molecules) free transcription machinery
  substanceOnly species TM in V = 0;
  // (molecules) free, size-independent genes
  substanceOnly species $GI in V;
  // (molecules) free, size-dependent genes
  substanceOnly species $GD in V;
  // (molecules) size-independent genes occupied by transcription machinery
  substanceOnly species GITM in V = 0.84;
  // (molecules) size-dependent genes occupied by transcription machinery
  substanceOnly species GDTM in V = 24;
  // (AU) size-independent protein
  substanceOnly species Pi in V = 0.5;
  // (AU) size-dependent protein
  substanceOnly species Pd in V = 0.5;
  substanceOnly species $TMt in V;

  // Parameters:
  // (molecules) total number of size-independent genes
  GIt = 1 unit_0;
  // (molecules) total number of size-dependent genes
  GDt = 500 unit_0;
  // (molecules) gene copy number
  GCN = 1 unit_0;
  // (molecules) copy number of the gene encoding Pi
  CPI = 1 unit_0;
  // (molecules) copy number of the gene encoding Pd
  CPD = 1 unit_0;
  // (AV/(molecule*min)) cell volume growth
  kSyVo = 0.042 unit_1;
  // (1/min) synthesis of transcription machinery
  kSyTm = 2.1 unit_2;
  // (AV/(molecule*min)) association of size-independent genes and transcription machinery
  kAsGiTm = 10 unit_1;
  // (AV/(molecule*min)) association of size-dependen genes and transcription machinery
  kAsGdTm = 1 unit_1;
  // (1/min) dissociation of size-independent genes and transcription machinery
  kDsGiTm = 0.1 unit_2;
  // (1/min) dissociation of size-dependent genes and transcription machinery
  kDsGdTm = 1 unit_2;
  // (AU/(molecule*min)) synthesis of size-independent protein (combined transcription and translation)
  kSyPi = 0.58 unit_3;
  // (AU/(molecule*min)) synthesis of size-dependent protein (combined transcription and translation)
  kSyPd = 10 unit_3;
  // (1/min) degradation rate of proteins
  kDeP = 1 unit_2;

  // Assignment rules:
  GI := GIt - GITM;
  GD := GDt - GDTM;
  TMt := (TM/V + GDTM/V + GITM/V)*V;

  // Rate rules:
  V' = kSyVo*GDTM*(GCN/GDt);

  // Reactions:
  Synthesis_of_transcription_machinery: => TM; V*rSyTm(kSyTm, GDTM/V, GCN, GDt);  // modifiers: GDTM
  Synthesis_of_size_independent_protein: => Pi; V*rSyPi(kSyPi, GITM/V, CPI, GIt); Synthesis_of_size_independent_protein is "Synthesis of size-independent protein";  // modifiers: GITM
  Synthesis_of_size_dependent_protein: => Pd; V*rSyPd(kSyPd, GDTM/V, CPD, GDt); Synthesis_of_size_dependent_protein is "Synthesis of size-dependent protein";  // modifiers: GDTM
  Degradation_of_size_independent_protein: Pi => ; kDeP*Pi; Degradation_of_size_independent_protein is "Degradation of size-independent protein";
  Degradation_of_size_dependent_protein: Pd => ; kDeP*Pd; Degradation_of_size_dependent_protein is "Degradation of size-dependent protein";
  Association_dissociation_of_TM_and_size_dependent_genes: TM + $GD -> GDTM; V*(kAsGdTm*(TM/V)*(GD/V) - kDsGdTm*(GDTM/V)); Association_dissociation_of_TM_and_size_dependent_genes is "Association/dissociation of TM and size-dependent genes";
  Association_dissociation_of_TM_and_size_independent_genes: TM + $GI -> GITM; V*(kAsGiTm*(TM/V)*(GI/V) - kDsGiTm*(GITM/V)); Association_dissociation_of_TM_and_size_independent_genes is "Association/dissociation of TM and size-independent genes";

  // Unit definitions:
  unit volume = 1e-3 litre;
  unit time = 60 second;
  unit substance = item;
  unit unit_0 = item; unit_0 is "#";
  unit unit_1 = volt / (0.06 second * item); unit_1 is "AV/(#*min)";
  unit unit_2 = 1 / (0.06 second); unit_2 is "1/min";
  unit unit_3 = 1 / (6 second); unit_3 is "AU/(#*min)";
end
