// SBML level 2 version 4

function rPhSbf(kPhSbfClb, CLB, SBFu)
  kPhSbfClb*CLB*SBFu;
end

function rPhWhi(kPhWhiCln3, CLN3, kPhWhiCln, CLN, kPhWhiClb, CLB, Substrate)
  (kPhWhiCln3*CLN3 + kPhWhiCln*CLN + kPhWhiClb*CLB)*Substrate;
end

function rSyClb(kSyClb, kSyClbClb, CLB, jSyClb, GDTM, GCN, GDt)
  (kSyClb + kSyClbClb*CLB/(jSyClb + CLB))*GDTM*(GCN/GDt);
end

function rAcCdc(kAcCdcClb, CLB, Substrate, jCdc)
  kAcCdcClb*CLB*(Substrate/(jCdc + Substrate));
end

function Expression_of_size_dependent_gene(kSy, GDTM, GCN, GDt)
  kSy*GDTM*(GCN/GDt);
end
Expression_of_size_dependent_gene is "Expression of size-dependent gene";

function rSyCln(kSyCln, GDTM, GCN, GDt, SBF, SBFt, SBFu)
  kSyCln*GDTM*(GCN/GDt)*(SBF/SBFt)*(SBFu/SBFt);
end

function rInCdc(kInCdc, Substrate, jCdc)
  kInCdc*Substrate/(jCdc + Substrate);
end

function rAcCdh(kAcCdh, kAcCdhCdc, CDCa, Substrate, jCdh)
  (kAcCdh + kAcCdhCdc*CDCa)*(Substrate/(jCdh + Substrate));
end

function rInCdh(kInCdhCln, CLN, kInCdhClb, CLB, Substrate, jCdh)
  (kInCdhCln*CLN + kInCdhClb*CLB)*(Substrate/(jCdh + Substrate));
end

function rSyWhi(GRd, kSyWhi, GITM, GWt, GIt)
  GRd*kSyWhi*GITM*(GWt/GIt);
end

function rDeClb(kDeClb, kDeClbCdh, CDHa, Substrate)
  (kDeClb + kDeClbCdh*CDHa)*Substrate;
end

model Budding_yeast_size_control_by_inhibitor_dilution___Mother_cell()
  // Budding yeast size control by inhibitor dilution - Mother cell
  // This model is decribed in the article:
  // Dilution and titration of cell-cycle regulators may control cell size in budding yeast
  // Frank S. Heldt, Reece Lunstone, John J. Tyson, Bela Novak
  // Abstract:
  // The size of a cell sets the scale for all biochemical processes within it, thereby affecting cellular fitness and survival. Hence, cell size needs to be kept within certain limits and relatively constant over multiple generations. However, how cells measure their size and use this information to regulate growth and division remains controversial. Here, we present two mechanistic mathematical models of the budding yeast (S. cerevisiae) cell cycle to investigate competing hypotheses on size control: inhibitor dilution and titration of nuclear sites. Our results suggest that an inhibitor-dilution mechanism, in which cell growth dilutes the transcriptional inhibitor Whi5 against the constant activator Cln3, can facilitate size homeostasis. This is achieved by utilising a positive feedback loop to establish a fixed size threshold for the START transition, which efficiently couples cell growth to cell cycle progression. Yet, we show that inhibitor dilution cannot reproduce the size of mutants that alter the cell’s overall ploidy and WHI5 gene copy number. By contrast, size control through titration of Cln3 against a constant number of genomic binding sites for the transcription factor SBF recapitulates both size homeostasis and the size of these mutant strains. Moreover, this model produces an imperfect ‘sizer’ behaviour in G1 and a ‘timer’ in S/G2/M, which combine to yield an ‘adder’ over the whole cell cycle; an observation recently made in experiments. Hence, our model connects these phenomenological data with the molecular details of the cell cycle, providing a systems-level perspective of budding yeast size control.
  // This version of the model, which is not shown in the article, tracks the parent cell after budding. Changes compared to the daughter cell model include: (i) the definition of rV, which affects the distribution of proteins at cell division, (ii) the change of compartment volume in the 'Division' event declaration, and (iii) the fate of newly synthesised Whi5 (WHIn) in the 'Division' event. Apart from these, all variables, reactions, parameters and events are the same.

  // Compartments:
  // (AV) total cell volume (including mother and daughter cell)
  compartment tV;
  // (AV) mother cell volume
  compartment mV = 1.6;
  // (AV) daughter cell volume
  compartment dV = 0;

  // Species:
  // (molecules) transcription machinery
  substanceOnly species TM in tV = 0;
  // (molecules) free, size-independent genes
  substanceOnly species $GI in tV;
  // (molecules) free, size-dependent genes
  substanceOnly species $GD in tV;
  // (molecules) size-independent genes occupied by transcription machinery
  substanceOnly species GITM in tV = 1;
  // (molecules) size-dependent genes occupied by transcription machinery
  substanceOnly species GDTM in tV = 80;
  // (AU) Cln3
  substanceOnly species CLN3 in tV = 1.6;
  // (AU) free Whi5
  substanceOnly species WHI in tV = 1.6;
  // (AU) phosphorylated Whi5
  substanceOnly species WHIp in tV = 1.3;
  // (AU) free SBF
  substanceOnly species SBF in tV = 0;
  // (AU) Whi5:SBF complexes
  substanceOnly species WHISBF in tV = 1.6;
  // (AU) newly synthesised Whi5
  substanceOnly species WHIn in tV = 0;
  // (AU) total Whi5
  substanceOnly species $WHIt in tV;
  // (AU) total SBF
  substanceOnly species $SBFt in tV;
  // (AU) unphosphorylated SBF
  // Note that SBFp and SBFu are treated independently from the other SBF-related variables such that SBFt = SBFp + SBFu as well as SBFt = SBF + WHISBF.
  substanceOnly species SBFu in tV = (SBFt/tV - SBFp/tV)*tV;
  // (AU) phosphorylated (inactive) SBF
  // Note that SBFp and SBFu are treated independently from the other SBF-related variables such that SBFt = SBFp + SBFu as well as SBFt = SBF + WHISBF.
  substanceOnly species SBFp in tV = 0;
  // (AU) Cln1/2
  substanceOnly species CLN in tV = 0;
  // (AU) Clb1/2
  substanceOnly species CLB in tV = 0;
  // (AU) active APC/C^Cdh1
  substanceOnly species CDHa in tV = 1.6;
  // (AU) inactive APC/C^Cdh1
  substanceOnly species CDHi in tV = 0;
  // (AU) active APC/C^Cdc20
  substanceOnly species CDCa in tV = 0;
  // (AU) inactive APC/C^Cdc20
  substanceOnly species CDCi in tV = 1.6;
  // (molecules) total amount of transcription machinery
  substanceOnly species $TMt in tV;
  // (AU) active SBF
  substanceOnly species $active_SBF in tV;

  // Parameters:
  // (molecules) total number of size-dependent genes
  GDt = 500 unit_0;
  // (molecules) gene copy number (of all genes except Whi5 and Cln3)
  GCN = 1 unit_0;
  // (molecules) copy number of Whi5 gene (corresponds to total number of size-independent genes, GIt)
  GWt = 1 unit_0;
  // (molecules) copy number of Cln3 gene
  GCt = 1 unit_0;
  // (AU/AV) Cln1/2 threshold for Start transition
  StartThr = 0.3 unit_1;
  // (AU/AV) Cln1/2 + Clb1/2 threshold for cell division
  MitosisThr = 0.2 unit_1;
  // (-) binary variable (1 - if mother cell growths)
  GRm = 1;
  // (-) binary variable (1 - if daughter cell growths)
  GRd = 0;
  // (AV/(molecule*min)) cell volume growth
  kSyVo = 0.042 unit_2;
  // (1/min) synthesis of transcription machinery
  kSyTm = 2.1 unit_3;
  // (AV/(molecule*min)) association of size-independent genes and transcription machinery
  kAsGiTm = 10 unit_2;
  // (AV/(molecule*min)) association of size-dependent genes and transcription machinery
  kAsGdTm = 1 unit_2;
  // (1/min) dissociation of size-independent genes and transcription machinery
  kDsGiTm = 0.1 unit_3;
  // (1/min) dissociation of size-dependent genes and transcription machinery
  kDsGdTm = 1 unit_3;
  // (AU/(molecule*min)) Cln3 synthesis
  kSyCln3 = 10 unit_4;
  // (1/min) Cln3 degradation
  kDeCln3 = 1 unit_3;
  // (AU/(molecule*min)) Cln1/2 synthesis
  kSyCln = 8 unit_4;
  // (1/min) constitutive Cln1/2 degradation
  kDeCln = 1 unit_3;
  // (AU/(molecule*min)) constitutive Clb1/2 synthesis
  kSyClb = 0.01 unit_4;
  // (AU/(molecule*min)) Clb1/2-dependent Clb1/2 synthesis
  kSyClbClb = 0.3 unit_4;
  // (AU/AV) Michaelis-Menten constant for Clb1/2 synthesis
  jSyClb = 0.3 unit_1;
  // (1/min) constitutive Clb1/2 degradation
  kDeClb = 0.01 unit_3;
  // (AV/(AU*min)) Cdh1-dependent Clb1/2 degradation
  kDeClbCdh = 2 unit_5;
  // (AU/(molecule*min)) Whi5 synthesis
  kSyWhi = 0.016 unit_4;
  // (AV/(AU*min)) Cln3-dependent Whi5 phosphorylation
  kPhWhiCln3 = 0.3 unit_5;
  // (AV/(AU*min)) Cln1/2-dependent Whi5 phosphorylation
  kPhWhiCln = 4 unit_5;
  // (AV/(AU*min)) Clb1/2-dependent Whi5 phosphorylation
  kPhWhiClb = 20 unit_5;
  // (1/min) dephosphorylation of Whi5
  kDpWhi = 1 unit_3;
  // (AV/(AU*min)) association of Whi5 and SBF
  kAsWhiSbf = 100 unit_5;
  // (1/min) dissociation of Whi5:SBF complexes
  kDsWhiSbf = 0.01 unit_3;
  // (AV/(AU*min)) Clb1/2-dependent SBF phosphorylation
  kPhSbfClb = 5 unit_5;
  // (1/min) SBF dephosphorylation
  kDpSbf = 0.2 unit_3;
  // (AU/(AV*min)) constitutive Cdh1 activation
  kAcCdh = 0.01 unit_6;
  // (1/min) Cdc20-dependent Cdh1 activation
  kAcCdhCdc = 2 unit_3;
  // (1/min) Cln1/2-dependent Cdh1 inactivation
  kInCdhCln = 0.125 unit_3;
  // (1/min) Clb1/2-dependent Cdh1 inactivation
  kInCdhClb = 2 unit_3;
  // (AU/AV) Michaelis-Menten constant for Cdh1 (in-)activation
  jCdh = 0.001 unit_1;
  // (1/min) Clb1/2-dependent Cdc20 activation
  kAcCdcClb = 0.5 unit_3;
  // (AU/(AV*min)) Cdc20 inactivation
  kInCdc = 0.25 unit_6;
  // (AU/AV) Michaelis-Menten constant for Cdc20 (in-)activation
  jCdc = 0.001 unit_1;
  // (molecules) total number of size-independent genes
  GIt = GWt; GIt has unit_0;
  // AU/(molecules*min) synthesis of SBF
  kSySbf has unit_4;
  // AU/(molecules*min) synthesis of Cdh1
  kSyCdh has unit_4;
  // AU/(molecules*min) synthesis of Cdc20
  kSyCdc has unit_4;

  // Assignment rules:
  tV := mV + dV;
  GD := GDt - GDTM;
  GI := GIt - GITM;
  SBFt := (SBF/tV + WHISBF/tV)*tV;
  active_SBF := SBF/tV*(SBFu/tV/(SBFt/tV))*tV;
  TMt := (TM/tV + GDTM/tV + GITM/tV)*tV;
  WHIt := (WHI/tV + WHIp/tV + WHIn/tV + WHISBF/tV)*tV;
  rV := mV/tV;
  kSySbf := 1*kSyVo;
  kSyCdh := 1*kSyVo;
  kSyCdc := 1*kSyVo;

  // Rate rules:
  mV' = GRm*kSyVo*GDTM*(GCN/GDt);
  dV' = GRd*kSyVo*GDTM*(GCN/GDt);

  // Reactions:
  Synthesis_of_transcription_machninery: => TM; tV*Expression_of_size_dependent_gene(kSyTm, GDTM/tV, GCN, GDt);  // modifiers: GDTM
  Association_dissociation_of_TM_and_size_independent_genes: TM + $GI -> GITM; tV*(kAsGiTm*(TM/tV)*(GI/tV) - kDsGiTm*(GITM/tV)); Association_dissociation_of_TM_and_size_independent_genes is "Association/dissociation of TM and size-independent genes";
  Association_dissociation_of_TM_and_size_dependent_genes: TM + $GD -> GDTM; tV*(kAsGdTm*(TM/tV)*(GD/tV) - kDsGdTm*(GDTM/tV)); Association_dissociation_of_TM_and_size_dependent_genes is "Association/dissociation of TM and size-dependent genes";
  Synthesis_of_Cln3: => CLN3; tV*Expression_of_size_dependent_gene(kSyCln3, GDTM/tV, GCt, GDt);  // modifiers: GDTM
  Degradation_of_Cln3: CLN3 => ; kDeCln3*CLN3;
  Association_dissociation_of_SBF_and_Whi5: SBF + WHI -> WHISBF; tV*(kAsWhiSbf*(SBF/tV)*(WHI/tV) - kDsWhiSbf*(WHISBF/tV)); Association_dissociation_of_SBF_and_Whi5 is "Association/dissociation of SBF and Whi5";
  Synthesis_of_SBF: => SBF + SBFu; tV*Expression_of_size_dependent_gene(kSySbf, GDTM/tV, GCN, GDt);  // modifiers: GDTM
  Phosphorylation_of_SBF: SBFu => SBFp; tV*rPhSbf(kPhSbfClb, CLB/tV, SBFu/tV);  // modifiers: CLB
  Dephosphorylation_of_SBF: SBFp => SBFu; kDpSbf*SBFp;
  Synthesis_of_Cln1_2: => CLN; tV*rSyCln(kSyCln, GDTM/tV, GCN, GDt, SBF/tV, SBFt/tV, SBFu/tV); Synthesis_of_Cln1_2 is "Synthesis of Cln1/2";  // modifiers: GDTM, SBF, SBFt, SBFu
  Degradation_of_Cln1_2: CLN => ; kDeCln*CLN; Degradation_of_Cln1_2 is "Degradation of Cln1/2";
  Phosphorylation_of_Whi5: WHI => WHIp; tV*rPhWhi(kPhWhiCln3, CLN3/tV, kPhWhiCln, CLN/tV, kPhWhiClb, CLB/tV, WHI/tV);  // modifiers: CLN3, CLN, CLB
  Phosphorylation_of_Whi5_SBF: WHISBF => WHIp + SBF; tV*rPhWhi(kPhWhiCln3, CLN3/tV, kPhWhiCln, CLN/tV, kPhWhiClb, CLB/tV, WHISBF/tV); Phosphorylation_of_Whi5_SBF is "Phosphorylation of Whi5:SBF";  // modifiers: CLN3, CLN, CLB
  Dephosphorylation_of_Whi5: WHIp => WHI; kDpWhi*WHIp;
  Synthesis_of_Cdh1: => CDHi; tV*Expression_of_size_dependent_gene(kSyCdh, GDTM/tV, GCN, GDt);  // modifiers: GDTM
  Synthesis_of_Cdc20: => CDCi; tV*Expression_of_size_dependent_gene(kSyCdc, GDTM/tV, GCN, GDt);  // modifiers: GDTM
  Activation_of_APC_Cdc20: CDCi => CDCa; tV*rAcCdc(kAcCdcClb, CLB/tV, CDCi/tV, jCdc); Activation_of_APC_Cdc20 is "Activation of APC^Cdc20";  // modifiers: CLB
  Inactivation_of_APC_C_Cdc20: CDCa => CDCi; tV*rInCdc(kInCdc, CDCa/tV, jCdc); Inactivation_of_APC_C_Cdc20 is "Inactivation of APC/C^Cdc20";
  Activation_of_APC_C_Cdh1: CDHi => CDHa; tV*rAcCdh(kAcCdh, kAcCdhCdc, CDCa/tV, CDHi/tV, jCdh); Activation_of_APC_C_Cdh1 is "Activation of APC/C^Cdh1";  // modifiers: CDCa
  Inactivation_of_APC_C_Cdh1: CDHa => CDHi; tV*rInCdh(kInCdhCln, CLN/tV, kInCdhClb, CLB/tV, CDHa/tV, jCdh); Inactivation_of_APC_C_Cdh1 is "Inactivation of APC/C^Cdh1";  // modifiers: CLN, CLB
  Synthesis_of_Clb1_2: => CLB; tV*rSyClb(kSyClb, kSyClbClb, CLB/tV, jSyClb, GDTM/tV, GCN, GDt); Synthesis_of_Clb1_2 is "Synthesis of Clb1/2";  // modifiers: GDTM
  Degradation_of_Clb1_2: CLB => ; tV*rDeClb(kDeClb, kDeClbCdh, CDHa/tV, CLB/tV); Degradation_of_Clb1_2 is "Degradation of Clb1/2";  // modifiers: CDHa
  Synthesis_of_Whi5: => WHIn; tV*rSyWhi(GRd, kSyWhi, GITM/tV, GWt, GIt);  // modifiers: GITM

  // Events:
  // Start transition is triggered when Cdk reaches a threshold, which initiats genome replication and bud growth.
  Start: at (CLN/tV >= StartThr): GRm = 0, GRd = 1, GCN = GCN*2, GCt = GCt*2, GWt = GWt*2, GIt = GIt*2, GDt = GDt*2;
  // Cell division is triggered when Cdk activity (combined Cln1/2 and Clb1/2 activity) drops below a thresholds that maintains the mitotic state.
  Division: at (CLN/tV + CLB/tV <= MitosisThr): GRm = 1, GRd = 0, GCN = GCN/2, GCt = GCt/2, GWt = GWt/2, CLN = CLN/tV*rV*tV, CLB = CLB/tV*rV*tV, CLN3 = CLN3/tV*rV*tV, dV = 0, GDTM = GDTM/tV*rV*tV, GDt = GDt/2, GITM = GITM/tV*rV*tV, GIt = GIt/2, TM = TM/tV*rV*tV, WHI = WHI/tV*rV*tV, WHIp = WHIp/tV*rV*tV, WHISBF = WHISBF/tV*rV*tV, WHIn = 0*tV, SBF = SBF/tV*rV*tV, SBFp = SBFp/tV*rV*tV, SBFu = SBFu/tV*rV*tV, CDCa = CDCa/tV*rV*tV, CDCi = CDCi/tV*rV*tV, CDHa = CDHa/tV*rV*tV, CDHi = CDHi/tV*rV*tV;

  // Unit definitions:
  unit volume = 1e-3 litre;
  unit time = 60 second;
  unit substance = item;
  unit unit_0 = dimensionless^0 * item; unit_0 is "#";
  unit unit_1 = (1.25e17 dimensionless)^0 * item / metre^3; unit_1 is "AU/AV";
  unit unit_2 = (1.333333e-21 dimensionless)^0 * metre^3 / (second * item); unit_2 is "AV/(#*min)";
  unit unit_3 = (0.01666667 dimensionless)^0 / second; unit_3 is "1/min";
  unit unit_4 = (1.666667e-4 dimensionless)^0 / second; unit_4 is "AU/(#*min)";
  unit unit_5 = (1.333333e-19 dimensionless)^0 * metre^3 / (second * item); unit_5 is "AV/(AU*min)";
  unit unit_6 = (2.083333e15 dimensionless)^0 * item / (metre^3 * second); unit_6 is "AU/(AV*min)";
end
