// SBML level 2 version 4

function rInCdc(kInCdc, Substrate, jCdc)
  kInCdc*Substrate/(jCdc + Substrate);
end

function rDeClb(kDeClb, kDeClbCdh, CDHa, Substrate)
  (kDeClb + kDeClbCdh*CDHa)*Substrate;
end

function rAcCdc(kAcCdcClb, CLB, Substrate, jCdc)
  kAcCdcClb*CLB*(Substrate/(jCdc + Substrate));
end

function rAcCdh(kAcCdh, kAcCdhCdc, CDCa, Substrate, jCdh)
  (kAcCdh + kAcCdhCdc*CDCa)*(Substrate/(jCdh + Substrate));
end

function rSyCln(kSyCln, GDTM, GCN, GDt, NSSBF, NSt, V)
  kSyCln*GDTM*(GCN/GDt)*GCN*(NSSBF*V/NSt);
end

function Expression_of_size_independent_protein(kSy, GITM, GCN, GIt)
  kSy*GITM*(GCN/GIt);
end
Expression_of_size_independent_protein is "Expression of size-independent protein";

function Expression_of_size_dependent_gene(kSy, GDTM, GCN, GDt)
  kSy*GDTM*(GCN/GDt);
end
Expression_of_size_dependent_gene is "Expression of size-dependent gene";

function rInCdh(kInCdhCln, CLN, kInCdhClb, CLB, Substrate, jCdh)
  (kInCdhCln*CLN + kInCdhClb*CLB)*(Substrate/(jCdh + Substrate));
end

function rPhWhi(kPhWhiCln, CLN, Substrate, kPhWhiCln3, Cln3)
  (kPhWhiCln3*Cln3 + kPhWhiCln*CLN)*Substrate;
end

function rSyClb(kSyClb, kSyClbClb, CLB, jSyClb, GDTM, GCN, GDt)
  (kSyClb + kSyClbClb*CLB/(jSyClb + CLB))*GDTM*(GCN/GDt);
end

model Budding_yeast_size_control_by_increasing_SBF_concentration()
  // This model is described in the article:
  // Dilution and titration of cell-cycle regulators may control cell size in budding yeast
  // Frank S. Heldt, Reece Lunstone, John J. Tyson, Bela Novak
  // PLoS Comput Biol, October 2018, 14(10), e1006548, doi: 10.1371/journal.pcbi.1006548
  // Abstract:
  // The size of a cell sets the scale for all biochemical processes within it, thereby affecting cellular fitness and survival. Hence, cell size needs to be kept within certain limits and relatively constant over multiple generations. However, how cells measure their size and use this information to regulate growth and division remains controversial. Here, we present two mechanistic mathematical models of the budding yeast (S. cerevisiae) cell cycle to investigate competing hypotheses on size control: inhibitor dilution and titration of nuclear sites. Our results suggest that an inhibitor-dilution mechanism, in which cell growth dilutes the transcriptional inhibitor Whi5 against the constant activator Cln3, can facilitate size homeostasis. This is achieved by utilising a positive feedback loop to establish a fixed size threshold for the START transition, which efficiently couples cell growth to cell cycle progression. Yet, we show that inhibitor dilution cannot reproduce the size of mutants that alter the cell’s overall ploidy and WHI5 gene copy number. By contrast, size control through titration of Cln3 against a constant number of genomic binding sites for the transcription factor SBF recapitulates both size homeostasis and the size of these mutant strains. Moreover, this model produces an imperfect ‘sizer’ behaviour in G1 and a ‘timer’ in S/G2/M, which combine to yield an ‘adder’ over the whole cell cycle; an observation recently made in experiments. Hence, our model connects these phenomenological data with the molecular details of the cell cycle, providing a systems-level perspective of budding yeast size control.

  // Compartments:
  // (AV) total cell volume (including mother and daughter cell)
  compartment tV;
  // (AV) mother cell volume
  compartment mV = 0.6;
  // (AV) daughter cell volume
  compartment dV = 0;

  // Species:
  // (molecules) transcription machinery
  substanceOnly species TM in tV = 0;
  // (molecules) free, size-independent genes
  substanceOnly species $GI in tV;
  // (molecules) free, size-dependent genes
  substanceOnly species $GD in tV;
  // (molecules) size-independent genes occupied by transcription machinery
  substanceOnly species GITM in tV = 1;
  // (molecules) size-dependent genes occupied by transcription machinery
  substanceOnly species GDTM in tV = 29;
  // (AU) Cln3
  substanceOnly species CLN3 in tV = 0.1;
  // (AU) Cln1/2
  substanceOnly species CLN in tV = 0;
  // (AU) Clb1/2
  substanceOnly species CLB in tV = 0;
  // (AU) active APC/C^Cdh1
  substanceOnly species CDHa in tV = 0.6;
  // (AU) inactive APC/C^Cdh1
  substanceOnly species CDHi in tV = 0;
  // (AU) active APC/C^Cdc20
  substanceOnly species CDCa in tV = 0;
  // (AU) inactive APC/C^Cdc20
  substanceOnly species CDCi in tV = 0.6;
  // (AU) free Whi5
  substanceOnly species WHI in tV = 0.34;
  // (AU) phosphorylated Whi5
  substanceOnly species WHIp in tV = 0;
  // (AU) free SBF
  substanceOnly species SBF in tV = 0;
  // (AU) Whi5:SBF complexes
  substanceOnly species WHISBF in tV = 0.28;
  // (AU) SBF on nuclear sites (SBF promoters)
  substanceOnly species NSSBF in tV = 0;
  // (AU) phosphorylated (inactive) SBF
  substanceOnly species SBFp in tV = 0;
  // (AU) size-independent protein
  substanceOnly species PI in tV = 0.85;
  // (AU) number of free nuclear sites
  substanceOnly species $NS in tV;
  // (molecules) total amount of transcription machinery
  substanceOnly species $TMt in tV;
  // (AU) total SBF
  substanceOnly species $SBFt in tV;
  // (AU) total Whi5
  substanceOnly species $WHIt in tV;

  // Parameters:
  // (molecules) total number of size-dependent genes
  GDt = 500 unit_0;
  // (molecules) gene copy number (of all genes except Whi5 and Cln3)
  GCN = 1 unit_0;
  // (molecules) WHI5 copy number
  GWt = 1 unit_0;
  // (molecules) copy number of Cln3 gene
  GCt = 1 unit_0;
  // (AU/AV) Cln1/2 threshold for Start transition
  StartThr = 0.3 unit_1;
  // (AU/AV) Clb1/2 threshold for cell division
  MitosisThr = 0.2 unit_1;
  // (-) binary variable (1 - if mother cell growths)
  GRm = 1;
  // (-) binary variable (1 - if daughter cell growths)
  GRd = 0;
  // (AV/(molecule*min)) cell volume growth
  kSyVo = 0.042 unit_2;
  // (1/min) synthesis of transcription machinery
  kSyTm = 2.1 unit_3;
  // (AV/(molecule*min)) association of size-independent genes and transcription machinery
  kAsGiTm = 10 unit_2;
  // (AV/(molecule*min)) association of size-dependent genes and transcription machinery
  kAsGdTm = 1 unit_2;
  // (1/min) dissociation of size-independent genes and transcription machinery
  kDsGiTm = 0.1 unit_3;
  // (1/min) dissociation of size-dependent genes and transcription machinery
  kDsGdTm = 1 unit_3;
  // (AU/(molecule*min)) Cln3 synthesis
  kSyCln3 = 1.5 unit_4;
  // (1/min) Cln3 degradation
  kDeCln3 = 1 unit_3;
  // (AU/(molecule*min)) Cln1/2 synthesis
  kSyCln = 8 unit_4;
  // (1/min) constitutive Cln1/2 degradation
  kDeCln = 1 unit_3;
  // (AU/(molecule*min)) constitutive Clb1/2 synthesis
  kSyClb = 0.01 unit_4;
  // (AU/(molecule*min)) Clb1/2-dependent Clb1/2 synthesis
  kSyClbClb = 0.3 unit_4;
  // (AU/AV) Michaelis-Menten constant for Clb1/2 synthesis
  jSyClb = 0.3 unit_1;
  // (1/min) constitutive Clb1/2 degradation
  kDeClb = 0.01 unit_3;
  // (AV/(AU*min)) Cdh1-dependent Clb1/2 degradation
  kDeClbCdh = 2 unit_5;
  // (AU/(molecule*min)) Whi5 synthesis
  kSyWhi = 0.15 unit_4;
  // (AV/(AU*min)) Cln3-dependent Whi5 phosphorylation
  kPhWhiCln3 = 1.05 unit_5;
  // (AV/(AU*min)) Cln1/2-dependent phosphorylation of free Whi5
  kPhWhiCln = 100 unit_5;
  // (1/min) dephosphorylation of Whi5
  kDpWhi = 1 unit_3;
  // (AU/(AV*min)) constitutive Cdh1 activation
  kAcCdh = 0.01 unit_6;
  // (1/min) Cdc20-dependent Cdh1 activation
  kAcCdhCdc = 2 unit_3;
  // (1/min) Cln1/2-dependent Cdh1 inactivation
  kInCdhCln = 0.125 unit_3;
  // (1/min) Clb1/2-dependent Cdh1 inactivation
  kInCdhClb = 2 unit_3;
  // (AU/AV) Michaelis-Menten constant for Cdh1 (in-)activation
  jCdh = 0.001 unit_1;
  // (1/min) Clb1/2-dependent Cdc20 activation
  kAcCdcClb = 0.5 unit_3;
  // (AU/(AV*min)) Cdc20 inactivation
  kInCdc = 0.25 unit_6;
  // (AU/AV) Michaelis-Menten constant for Cdc20 (in-)activation
  jCdc = 0.001 unit_1;
  // (molecules) total number of size-independent genes
  GIt = 1 unit_0;
  // AU/(molecules*min) synthesis of Cdh1
  kSyCdh has unit_4;
  // AU/(molecules*min) synthesis of Cdc20
  kSyCdc has unit_4;
  // (AU) total number of nuclear sites (SBF promoters)
  NSt = 1 unit_7;
  // (1/min) Whi5 degradation
  kDeWhi = 0.01 unit_3;
  // (AU/(molecule*min)) SBF synthesis
  kSySbf = 0.3 unit_4;
  // (AV/(AU*min)) SBF degradation by size-independent protein
  kDeSbfPi = 0.04 unit_5;
  // (AV/(AU*min)) Clb1/2-dependent SBF phosphorylation
  kPhSbfClb = 5 unit_5;
  // (1/min) SBF dephosphorylation
  kDpSbf = 0.2 unit_3;
  // (AV/(AU*min)) association of Whi5 and SBF
  kAsWhiSbf = 1000 unit_5;
  // (1/min) dissociation of Whi5:SBF complexes
  kDsWhiSbf = 0.1 unit_3;
  // (1/min) dissociation of Whi5:SBF complexes
  kAsNsSbf = 10 unit_5;
  // (1/min) dissociation of SBF and nuclear sites
  kDsNsSbf = 0.1 unit_3;
  // (AU/(molecule*min)) size-independent protein synthesis
  kSyPi = 0.1 unit_4;
  // (1/min) size-independent protein degradaton
  kDePi = 0.1 unit_3;

  // Assignment rules:
  tV := mV + dV;
  GI := GIt - GITM;
  GD := GDt - GDTM;
  TMt := (TM/tV + GITM/tV + GDTM/tV)*tV;
  NS := NSt - NSSBF;
  SBFt := (SBF/tV + SBFp/tV + NSSBF/tV + WHISBF/tV)*tV;
  WHIt := (WHI/tV + WHIp/tV + WHISBF/tV)*tV;
  rV := dV/tV;
  kSyCdc := 1*kSyVo;
  kSyCdh := 1*kSyVo;

  // Rate rules:
  mV' = GRm*kSyVo*GDTM*(GCN/GDt);
  dV' = GRd*kSyVo*GDTM*(GCN/GDt);

  // Reactions:
  Synthesis_of_transcription_machninery: => TM; tV*Expression_of_size_dependent_gene(kSyTm, GDTM/tV, GCN, GDt);  // modifiers: GDTM
  Association_dissociation_of_TM_and_size_independent_genes: TM + $GI -> GITM; tV*(kAsGiTm*(TM/tV)*(GI/tV) - kDsGiTm*(GITM/tV)); Association_dissociation_of_TM_and_size_independent_genes is "Association/dissociation of TM and size-independent genes";
  Association_dissociation_of_TM_and_size_dependent_genes: TM + $GD -> GDTM; tV*(kAsGdTm*(TM/tV)*(GD/tV) - kDsGdTm*(GDTM/tV)); Association_dissociation_of_TM_and_size_dependent_genes is "Association/dissociation of TM and size-dependent genes";
  Synthesis_of_Cln3: => CLN3; tV*Expression_of_size_dependent_gene(kSyCln3, GDTM/tV, GCt, GDt);  // modifiers: GDTM
  Degradation_of_Cln3: CLN3 => ; kDeCln3*CLN3;
  Synthesis_of_Cdh1: => CDHi; tV*Expression_of_size_dependent_gene(kSyCdh, GDTM/tV, GCN, GDt);  // modifiers: GDTM
  Synthesis_of_Cdc20: => CDCi; tV*Expression_of_size_dependent_gene(kSyCdc, GDTM/tV, GCN, GDt);  // modifiers: GDTM
  Activation_of_APC_Cdc20: CDCi => CDCa; tV*rAcCdc(kAcCdcClb, CLB/tV, CDCi/tV, jCdc); Activation_of_APC_Cdc20 is "Activation of APC^Cdc20";  // modifiers: CLB
  Inactivation_of_APC_C_Cdc20: CDCa => CDCi; tV*rInCdc(kInCdc, CDCa/tV, jCdc); Inactivation_of_APC_C_Cdc20 is "Inactivation of APC/C^Cdc20";
  Activation_of_APC_C_Cdh1: CDHi => CDHa; tV*rAcCdh(kAcCdh, kAcCdhCdc, CDCa/tV, CDHi/tV, jCdh); Activation_of_APC_C_Cdh1 is "Activation of APC/C^Cdh1";  // modifiers: CDCa
  Inactivation_of_APC_C_Cdh1: CDHa => CDHi; tV*rInCdh(kInCdhCln, CLN/tV, kInCdhClb, CLB/tV, CDHa/tV, jCdh); Inactivation_of_APC_C_Cdh1 is "Inactivation of APC/C^Cdh1";  // modifiers: CLN, CLB
  Synthesis_of_Clb1_2: => CLB; tV*rSyClb(kSyClb, kSyClbClb, CLB/tV, jSyClb, GDTM/tV, GCN, GDt); Synthesis_of_Clb1_2 is "Synthesis of Clb1/2";  // modifiers: GDTM
  Degradation_of_Clb1_2: CLB => ; tV*rDeClb(kDeClb, kDeClbCdh, CDHa/tV, CLB/tV); Degradation_of_Clb1_2 is "Degradation of Clb1/2";  // modifiers: CDHa
  Synthesis_of_Whi5: => WHI; tV*Expression_of_size_dependent_gene(kSyWhi, GDTM/tV, GWt, GDt);  // modifiers: GDTM
  Association_dissociation_of_Whi5_and_SBF: WHI + SBF -> WHISBF; tV*(kAsWhiSbf*(WHI/tV)*(SBF/tV) - kDsWhiSbf*(WHISBF/tV)); Association_dissociation_of_Whi5_and_SBF is "Association/dissociation of Whi5 and SBF";
  Phosphorylation_of_Whi5: WHI => WHIp; tV*rPhWhi(kPhWhiCln, CLN/tV, WHI/tV, kPhWhiCln3, CLN3/tV);  // modifiers: CLN, CLN3
  Degradation_of_Whi5: WHI => ; kDeWhi*WHI;
  Dephosphorylation_of_Whi5: WHIp => WHI; kDpWhi*WHIp;
  Degradation_of_phosphorylated_Whi5: WHIp => ; kDeWhi*WHIp;
  Synthesis_of_SBF: => SBF; tV*Expression_of_size_dependent_gene(kSySbf, GDTM/tV, GCN, GDt);  // modifiers: GDTM
  Degradation_of_SBF: SBF + PI => PI; kDeSbfPi*SBF*(PI/tV);
  Phosphorylation_of_SBF: SBF + CLB => SBFp + CLB; kPhSbfClb*SBF*(CLB/tV);
  Association_dissociation_of_SBF_and_nuclear_sites: SBF + $NS -> NSSBF; tV*(kAsNsSbf*(SBF/tV)*(NS/tV) - kDsNsSbf*(NSSBF/tV)); Association_dissociation_of_SBF_and_nuclear_sites is "Association/dissociation of SBF and nuclear sites";
  Association_of_Whi5_and_SBF_on_nuclear_sites: WHI + NSSBF => WHISBF + $NS; kAsWhiSbf*WHI*(NSSBF/tV);
  Phosphorylation_of_Whi5_in_Whi5_SBF_complexes: WHISBF => WHIp + SBF; tV*rPhWhi(kPhWhiCln, CLN/tV, WHISBF/tV, kPhWhiCln3, CLN3/tV); Phosphorylation_of_Whi5_in_Whi5_SBF_complexes is "Phosphorylation of Whi5 in Whi5:SBF complexes";  // modifiers: CLN, CLN3
  Degradation_of_Whi5_in_Whi5_SBF_complexes: WHISBF => SBF; kDeWhi*WHISBF; Degradation_of_Whi5_in_Whi5_SBF_complexes is "Degradation of Whi5 in Whi5:SBF complexes";
  Degradation_of_SBF_in_Whi5_SBF_complexes: WHISBF + PI => WHI + PI; kDeSbfPi*WHISBF*(PI/tV); Degradation_of_SBF_in_Whi5_SBF_complexes is "Degradation of SBF in Whi5:SBF complexes";
  Phosphorylation_of_SBF_on_nuclear_sites: NSSBF + CLB => $NS + SBFp + CLB; kPhSbfClb*NSSBF*(CLB/tV);
  Degradation_of_SBF_on_nuclear_sites: NSSBF + PI => $NS + PI; kDeSbfPi*NSSBF*(PI/tV);
  Dephosphorylation_of_SBF: SBFp => SBF; kDpSbf*SBFp;
  Synthesis_of_size_independent_protein: => PI; tV*Expression_of_size_independent_protein(kSyPi, GITM/tV, GCN, GIt); Synthesis_of_size_independent_protein is "Synthesis of size-independent protein";  // modifiers: GITM
  Degradation_of_size_independent_protein: PI => ; kDePi*PI; Degradation_of_size_independent_protein is "Degradation of size-independent protein";
  Degradation_of_phosphorylated_SBF: SBFp + PI => PI; kDeSbfPi*SBFp*(PI/tV);
  Degradation_of_Cln1_2: CLN => ; kDeCln*CLN; Degradation_of_Cln1_2 is "Degradation of Cln1/2";
  Synthesis_of_Cln1_2: => CLN; tV*rSyCln(kSyCln, GDTM/tV, GCN, GDt, NSSBF/tV, NSt, tV); Synthesis_of_Cln1_2 is "Synthesis of Cln1/2";  // modifiers: GDTM, NSSBF

  // Events:
  // Start transition is triggered when Cdk reaches a threshold, which initiats genome replication and bud growth.
  Start: at (CLN/tV >= StartThr): GRm = 0, GRd = 1, GCN = GCN*2, GCt = GCt*2, GWt = GWt*2, GIt = GIt*2, GDt = GDt*2, NSt = NSt*2;
  // Cell division is triggered when Cdk activity (combined Cln1/2 and Clb1/2 activity) drops below a thresholds that maintains the mitotic state.
  Division: at (CLN/tV + CLB/tV <= MitosisThr): GRm = 1, GRd = 0, GCN = GCN/2, GCt = GCt/2, GWt = GWt/2, mV = dV, CLN = CLN/tV*rV*tV, CLB = CLB/tV*rV*tV, CLN3 = CLN3/tV*rV*tV, dV = 0, GDTM = GDTM/tV*rV*tV, GDt = GDt/2, GITM = GITM/tV*rV*tV, GIt = GIt/2, TM = TM/tV*rV*tV, CDCa = CDCa/tV*rV*tV, CDCi = CDCi/tV*rV*tV, CDHa = CDHa/tV*rV*tV, CDHi = CDHi/tV*rV*tV, NSt = NSt/2, WHI = WHI/tV*rV*tV, WHIp = WHIp/tV*rV*tV, WHISBF = WHISBF/tV*rV*tV, NSSBF = NSSBF/tV*rV*tV, SBF = SBF/tV*rV*tV, SBFp = SBFp/tV*rV*tV, PI = PI/tV/2*tV;

  // Unit definitions:
  unit volume = 1e-3 litre;
  unit time = 60 second;
  unit substance = item;
  unit unit_0 = item; unit_0 is "#";
  unit unit_1 = (0.01 dimensionless)^0 * item / volt; unit_1 is "AU/AV";
  unit unit_2 = volt / (0.06 second * item); unit_2 is "AV/(#*min)";
  unit unit_3 = 1 / (0.06 second); unit_3 is "1/min";
  unit unit_4 = 1 / (6 second); unit_4 is "AU/(#*min)";
  unit unit_5 = volt * (0.01 dimensionless)^0 / (0.06 second * item); unit_5 is "AV/(AU*min)";
  unit unit_6 = (0.01 dimensionless)^0 * item / (0.06 second * volt); unit_6 is "AU/(AV*min)";
  unit unit_7 = (0.01 dimensionless)^0 * item; unit_7 is "AU";
end
